r0 := 1
a0 := 0.029
lam := 0.5*π
rk := 1.524
mu := 1.3273*10^20
Re := 149698261000
check := a0 ≤ 1/(3*sin(lam + asin(1/3)))
1/(3*sin(lam + asin(1/3))) = 0.353553
t_b_r := Re*sqrt(Re/mu)
check = 1
B := a0*sin(lam)/(1 - a0*cos(lam))
a_b_r := mu/Re^2
alf := π/2 - 1/2*asin(B*(3 + sqrt(1 - 8*B^2))/(1 + B^2))
z := alf/deg = 86.675
# орбита марса
V_b_r := sqrt(mu/Re)
r(fi) := r0*e^(fi*cot(alf))
t := 2*(rk^(3/2) - r0^(3/2))/(3*cos(alf)*sqrt(1 - a0*sin(alf - lam)/sin(alf))) = 10.1223
t*t_b_r/(3600*24) = 588.988
x := 0, 0.01 .. 3*π
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0.009*t_b_r/(3600*24) = 0.523684
0.5*3600*24/t_b_r = 0.00859297
0.00017171976/a_b_r = 0.0289924
V_fik := 1/sqrt(rk) = 0.810042
V_fik*V_b_r = 24120.4
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